# OpenSim document version 20302
ScaleTool subject01:
  mass: 72.6 [kg]
  height: 1803.4
  age: 99
  notes: This is an example setup file for scale.exe.
  GenericModelMaker:
    model_file: gait10dof18musc.osim
    # marker_set_file> </marker_set_file
  ModelScaler:
    apply: true
    scaling_order: manualScale
    ScaleSet:
      Scale: scales=(1.14724 1.14724 1.14724) segment=torso apply=true
      Scale: scales=(1.14724 1.14724 1.14724) segment=femur_l apply=true
      Scale: scales=(0.988523 0.988523 0.988523) segment=tibia_r apply=true
      Scale: scales=(0.988523 0.988523 0.988523) segment=tibia_l apply=true
  MarkerPlacer:
    apply: false
